β := 15 deg
Z := 30
x := 0.5
α_n := 20 deg
α_n = 0.349066
α_t := atan(tan(α_n)/cos(β)) = 20.6469 deg
invαt := tan(α_t) - α_t = 0.0164534
Z_w := Z/π*((1 + sin(β)^2/(cos(β)^2 + tan(α_n)^2))*sqrt((cos(β)^2 + tan(α_n)^2)*(sec(β) + 2*x/Z)^2 - 1) - invαt - 2*x/Z*tan(α_n)) + 0.5
Z_w = 4.95188
((1 + sin(β)^2/(cos(β)^2 + tan(α_n)^2))*sqrt((cos(β)^2 + tan(α_n)^2)*(sec(β) + 2*x/Z)^2 - 1) - invαt - 2*x/Z*tan(α_n)) = 0.4662
